## Лабораторна робота №1
# Тема:  Безперервно-детерміновані моделі
# Мета:  ознайомитися з прикладами безперервно-детермінованих
# моделей і методами їх побудови та дослідження.
5
# Моделювання процесу взаємодії двох популяцій - хижаків та їх жертв
# коефіцієнт народжуваноті жертв
a := 0.29
# коефіцієнт природної смертності жертв
b := 0.000006
# коефіцієнт смертності в результаті зустрічі з хижаком
c := 0.0003
# коефіцієнт народжуваності хижаків
d := 1*10^-5
# коефіцієнт природної смертності хижаків
e := 0.015
# коефіцієнт поповнення популяції хижаків внаслідок поїдання жертв
f := 1*10^-4
# Позначимо компоненти вектору працюючих змінних:
# - жертви, початкова чисельність
# - хижаки, початкова чисельність
y0 := [1200; 3200]
# Формуємо векторну функцію двох аргументів -
# скалярного аргумента t (час) та векторного аргументу y
D(t, y) := [a*y[0] - b*y[0] - c*y[0]*y[1]; d*y[1] - e*y[1] + f*y[0]*y[1]]
# Викликаємо процедури вирішення ДУ методом Рунге-Кута фіксованим кроком разрахунку:
# y - ім'я вектору працюючих змінних,
# t1 - початкове значення на шкалі часу,
# t2 - закінчене значення на шкалі часу,
# M - кількість точок розрахунку,
# D - ім'я векторної функції правих частин ДУ
t1 := 0
t2 := 1200
M := 1200
Z := rkfixed(y0, t1, t2, M, D)
i := 0 .. 1200
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Z =  # no stored result
# Висновок:У першій моделі спроба повторити графік з методичної вказівки призвела до отримання класичних коливань популяцій хижаків та жертв. Видно, що чисельність жертв зростає до пікових значень, після чого швидко скорочується через вплив хижаків. Чисельність хижаків слідує за чисельністю жертв із невеликим запізненням.
2
# коефіцієнт народжуваноті жертв
a1 := 0.42
# коефіцієнт природної смертності жертв
b1 := 5*10^-6
# коефіцієнт смертності в результаті зустрічі з хижаком
c1 := 0.0005
# коефіцієнт народжуваності хижаків
d1 := 1*10^-5
# коефіцієнт природної смертності хижаків
e1 := 0.015
# коефіцієнт поповнення популяції хижаків внаслідок поїдання жертв
f1 := 1*10^-4
y[0] := 1200  # - хижаки, початкова чисельність
y[1] := 3200  # - жертви, початкова чисельність
y := [y[0]; y[1]]  # Задамо початкові умови у виді вектору
D(t, y) := [a1*y[0] - b1*y[0] - c1*y[0]*y[1]; d1*y[1] - e1*y[1] + f1*y[0]*y[1]]
t1 := 0
t2 := 1200
M := 1200
Z := rkfixed(y, t1, t2, M, D)
i := 0 .. 1200
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Z =  # no stored result
# Висновок:У другій моделі були внесені зміни для збільшення популяції хижаків. Були змінені коефіцієнти народжуваності та смертності жертв, коефіцієнт смертності при зустрічі з хижаком. Гграфік з показує, що популяція хижаків має набагато більше пікове значення, а все одно сильно залежить від популяції жертв.
3
# коефіцієнт народжуваноті жертв
a2 := 0.29
# коефіцієнт природної смертності жертв
b2 := 0.000006
# коефіцієнт смертності в результаті зустрічі з хижаком
c2 := 0.0002
# коефіцієнт народжуваності хижаків
d2 := 1*10^-2
# коефіцієнт природної смертності хижаків
e2 := 0.020
# коефіцієнт поповнення популяції хижаків внаслідок поїдання жертв
f2 := 1*10^-4
y0 := 1200  # - хижаки, початкова чисельність
y1 := 3200  # - жертви, початкова чисельність
y := [1200; 3200]  # Задамо початкові умови у виді вектору
D(t, y) := [a2*y[0] - b2*y[0] - c2*y[0]*y[1]; d2*y[1] - e2*y[1] + f2*y[0]*y[1]]
t1 := 0
t2 := 1200
M := 1200
Z := rkfixed(y, t1, t2, M, D)
i := 0 .. 1200
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Z =  # no stored result
# Висновок:У третій моделі були внесені зміни для збільшення популяції жертв. Були змінені коефіцієнти народжуваності та природної смертності хижаків, зменшений коефіцієнт смертності при зустрічі з хижаком, а також знижений коефіцієнт народжуваності хижаків. Гграфік з показує, що популяція хижаків набагато менша у пікових значеннях та здебільшого знаходиться у мінімумі, а популяція жертв не падає так сильно.
# 4
# коефіцієнт народжуваноті жертв
a3 := 0.095
# коефіцієнт природної смертності жертв
b3 := 0.00006
# коефіцієнт смертності в результаті зустрічі з хижаком
c3 := 0.0002
# коефіцієнт народжуваності хижаків
d3 := 1*10^-2
# коефіцієнт природної смертності хижаків
e3 := 0.020
# коефіцієнт поповнення популяції хижаків внаслідок поїдання жертв
f3 := 1*10^-4
y0 := 1200  # - хижаки, початкова чисельність
y1 := 1200  # - жертви, початкова чисельність
y := [1200; 1200]  # Задамо початкові умови у виді вектору
D(t, y) := [a3*y[0] - b3*y[0] - c3*y[0]*y[1]; d3*y[1] - e3*y[1] + f3*y[0]*y[1]]
t1 := 0
t2 := 1200
M := 1200
Z := rkfixed(y, t1, t2, M, D)
i := 0 .. 1200
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Z =  # no stored result
# Висновок:У четвертій моделі були внесені зміни для максимального наближення популяції двох видів Були змінені усі коефіцієнти так, щоб наблизити піки популяції один до одного. Гграфік з показує, що популяція хижаків все ще зростає та спадає у швидших темпах, тому досягає піку раніше, ніж жертви.
