# Одноканальна закмкнена система - заявки періодично повертаються
# Варіант: 16 | Ескаватор навантажує самоскиди
# 1. Задання вихідних даних
n := 1
ga := 80  # Ємність автосамоскида
ge := 40  # Ємність ковша екскаватора
m := 5  # Кількість автосамоскидів у системі
tob := 16  # Час обертання автосамоскида
tpцl := 40  # Час циклу навантаження екскаватора
# Інтенсивність надходження заявок (величина, зворотня середньому інтвервалу часу надхоження заявок):
λ := 60/tob
λ = 3.75
tзавант := (ga/ge)*tpцl/60
tзавант = 1.33333  # хв
# Інтенсивність обслуговування заявок
μ := 60/tзавант
μ = 45  # завант на год
# Приведена інтенсивність потоку заявок або коефіцієнт загрузки
p := λ/μ
p = 0.0833333
# Ймовірність простою екскаватора за формулою Ерланга
P[0] := 1/(1 + sum(m!/(m - n)!*p^n, n = 1 .. m))
P[0] = 0.626352
# 2. Початкові наближення:
P0 := 0.15
P1 := 0.15
P2 := 0.15
P3 := 0.15
P4 := 0.15
P5 := 0.25
# 3. Запис системи рівнянь, що описують функціонування одноканальної СМО
Given
P0*m*λ == P1*μ
P1*(μ + (m - 1)*λ) == P0*m*λ + P2*μ
P2*(2*μ + (m - 2)*λ) == P1*(m - 1)*λ + P3*μ
P3*(2*μ + (m - 3)*λ) == P2*(m - 2)*λ + P4*μ
P4*(2*μ + (m - 4)*λ) == P3*(m - 3)*λ + P5*μ
P0 + P1 + P2 + P3 + P4 + P5 == 1.0
[P0; P1; P2; P3; P4; P5] := Find(P0, P1, P2, P3, P4, P5)
# 4. Результати розв'яння рівнянь:
P0 = 0.363241
P1 = 0.151351
P2 = 0.0504502
P3 = 0.0630627
P4 = 0.124023
P5 = 0.247872
# 5. Фактична продуктивність комплекту машин:
Pf := (1 - P0)*μ*ga
Pf = 2292.33
# 6. Середнє число машин, що знаходяться в системі (у черзі або на завантаженні):
Nsyst := m - (1 - P0)/p
Nsyst = -2.6411
# 7. Середнє число машин, що знаходяться в черзі:
Nch := Nsyst - (1 - P0)
Nch = -3.27786
