# Багатоканальна закмкнена CMO
# Варіант: 16 | Ескаватор навантажує самоскиди
# 1. Задання вихідних даних
μ := 21
λ := 12
m := 5  # - максимальне число заявок
N := 16  # - число каналів
# 2. Система диф. рівнянь, що описують функціонування багатоканальної замкненої СМО
d/dt(P[0]*t) == P[1]*t*μ - P[0]*t*m*λ
d/dt(P[1]*t) == P[0]*t*m*λ + P[2]*t*2*μ - P[1]*t*(μ + (m - 1)*λ)
d/dt(P[2]*t) == P[1]*t*(m - 1)*λ + P[3]*t*3*μ - P[2]*t*(2*μ + (m - 2)*λ)
d/dt(P[3]*t) == P[2]*t*(m - 2)*λ + P[4]*t*4*μ - P[3]*t*(3*μ + (m - 3)*λ)
d/dt(P[4]*t) == P[3]*t*(m - 3)*λ + P[5]*t*5*μ - P[4]*t*(4*μ + (m - 4)*λ)
d/dt(P[5]*t) == P[4]*t*λ - P[5]*t*m*μ
# 3. Сформуємо функцію, яка визначає вектор відхилень шуканих величин D(t, P) і вектор початкових значень P:
D(t, P) := [
    P[1]*t*μ - P[0]*t*m*λ;
    P[0]*t*m*λ + P[2]*t*2*μ - P[1]*t*(μ + (m - 1)*λ);
    P[1]*t*(m - 1)*λ + P[3]*t*3*μ - P[2]*t*(2*μ + (m - 2)*λ);
    P[2]*t*(m - 2)*λ + P[4]*t*4*μ - P[3]*t*(3*μ + (m - 3)*λ);
    P[3]*t*(m - 3)*λ + P[5]*t*5*μ - P[4]*t*(4*μ + (m - 4)*λ);
    P[4]*t*λ - P[5]*t*m*μ
]
P := [1; 0; 0; 0; 0; 0]
# 4. Визначимо додаткові параметри для розв'язання системи диф. рівнянь: початковий і кінцевий час дослідження та число кроків інтегрування:
t0 := 0
t1 := 0.3
N1 := 100
# 5. Розв'язання системи диф. рівнянь із застосуванням функції rkfixed(P,t0,t1,N,D):
S := rkfixed(P, t0, t1, N1, D)
t := S[:, 0]
P0 := S[:, 1]
P1 := S[:, 2]
P2 := S[:, 3]
P3 := S[:, 4]
P4 := S[:, 5]
P5 := S[:, 6]
# 6. Представлення рішення у графічному вигляді:
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P1 = [
    0; 0.000269922; 0.00107875; 0.00242366; 0.0043; 0.00670124; 0.0096191; 0.0130435; 0.0169627; 0.0213634
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]
P1 = [
    0; 0.000269922; 0.00107875; 0.00242366; 0.0043; 0.00670124; 0.0096191; 0.0130435; 0.0169627; 0.0213634
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]
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