# Розімкнена багатоканальна СМО без черги
# Варіант: 16 | АЗС заправляє машини
# 1. Задання вихідних даних
# Потік заявок:
λ := 85  # заявок/год
# Час обслуговування однієї машини:
μ := 24  # заявок/год
# Кількість каналів обслуговування (колонок):
c := 4
# Штраф: 10 грн за 15 хв простою:
st := 40  # грн/год
# Вартість експлуатації 1 колонки:
ekps := 20  # грн/год
# 2. Коефіцієнт завантаження:
a := λ/μ = 3.54167
# 3. Ймовірність відмови (формула Ерланга B):
P_відм := a^c/c!/sum(a^k/k!, k = 0 .. c) = 0.264629
# 4. Кількість обслугованих машин на годину:
A := λ*(1 - P_відм) = 62.5065
# 5. Середня кількість відмов:
R := λ*P_відм = 22.4935
# 6. Загальні витрати на годину:
C := c*ekps + R*st = 979.74  # грн
